log             log.MIL-120 append
units           real
atom_style      full
boundary        p p p

pair_style      lj/cut/coul/long 1.000
bond_style      harmonic
angle_style     cosine/periodic
dihedral_style  harmonic
improper_style  fourier
kspace_style    ewald 0.000001

special_bonds   lj/coul 0.0 0.0 1.0
pair_modify     tail yes mix arithmetic
dielectric      1.0
box tilt        large
read_data       data.MIL-120

#### Atom Groupings ####
group           fram     id   1:40
#### END Atom Groupings ####

variable        dt         equal 1.00
variable        tdamp      equal 100*${dt}
fix             1 fram langevin 298.00 298.00 ${tdamp} 961590
fix             2 fram nve
thermo          0
run             200000
unfix           1
unfix           2
fix             3 fram nvt temp 298.00 298.00 ${tdamp}
thermo          1
run             200000
unfix           3
